// COMSOL Multiphysics 6.4.0.343 model "rotating_anode_heat_transfer_Mo_99um.mph"
// Outline of the model tree

Parameters
  L_sub = 0.01[m]  // Substrate length (x)
  W_sub = 0.01[m]  // Substrate width (y)
  H_sub = 0.001[m]  // Substrate height (z)
  t_anode = 9.999999999999999e-05[m]  // Anode layer thickness
  sigma_x = 2.97e-05[m]  // Beam sigma in x
  sigma_y = 0.000297[m]  // Beam sigma in y
  L_track = 0.003[m]  // Beam track length
  T_period = 0.001[s]  // Rotation period
  t_on = 0.0001[s]  // Beam on time per period
  v_beam = 30.0[m/s]  // Beam velocity
  P0 = 100[W]  // Total beam power
  T_ambient = 293.15[K]  // Ambient temperature
  z_peak = 2.3020886293202285e-06[m]  // Gruen peak depth
  sigma_z = 1.5347257528801525e-06[m]  // Gruen depth sigma
  R_gruen = 7.673628764400762e-06[m]  // Gruen range
  norm_z = 259943.69329683512[1/m]  // Depth normalization

Geometry
  geom1 "Geometry 1" (3D, length unit m)
    substrate: Block | size = {L_sub, W_sub, H_sub}; pos = {-L_sub/2, -W_sub/2, 0}
    beam_track: Block "Beam Track Region"
      size = {2*(L_track/2 + 7*sigma_x), 2*7*sigma_y, t_anode}
      pos = {-(L_track/2 + 7*sigma_x), -7*sigma_y, H_sub}
    anode: Block | size = {L_sub, W_sub, t_anode}; pos = {-L_sub/2, -W_sub/2, H_sub}
    fin: Finalize "Form Union"

Materials
  mat_substrate: Common "Substrate Material" on domains 1
    def: def "Basic"
      density = 10220 - 0.5*(T-300)
      thermalconductivity = 138 - 0.025*(T-300)
      heatcapacity = 251 + 0.03*T
  mat_anode: Common "Anode Material" on domains 2, 3
    // same settings as mat_substrate

Physics
  ht: HeatTransfer on all domains
    dependent variable T
    solid1: SolidHeatTransferModel "Solid 1" (default)
    init1: init "Initial Values 1" (default) | Tinit = T_ambient
    ins1: ThermalInsulation (default)
    temp1: TemperatureBoundary "Fixed Temperature BCs" on boundaries 1-5 | T0 = T_ambient
    hs1: HeatSource "Electron Beam Heat Source" on domains 2, 3
      Q0 = P0 * (1/(2*pi*sigma_x*sigma_y))*exp(-((x-(-L_track/2 + (mod(t, T_period)/t_on)*L_track))^2/(2*sigma_x^2) + y^2/(2*sigma_y^2))) * norm_z*((H_sub + t_anode - z)/z_peak)*exp(-(((H_sub + t_anode - z)-z_peak)^2)/(2*sigma_z^2)) * (((H_sub + t_anode - z) > 0) * ((H_sub + t_anode - z) < R_gruen)) * (mod(t, T_period) < t_on)
  ev: Events on all domains
    ds1: DiscreteStates | dim = beam_state; dimInit = 1
    expl1: ExplicitEvent | start = 10e-6; period = 100e-6; reInitName = beam_state; reInitValue = 0

Mesh
  mesh1 "Mesh 1"
    size: MeshSizeDefault | hauto = 7
    ftet1: FreeTet "Free Tetrahedral 1" on remaining entities

Studies
  std1 "Time Dependent Study"
    time1: Transient "Time Dependent" | tlist = range(0, 1e-06, 0.01)

Solver configurations
  sol1 "Solution 1" (study std1)
    v1: Variables "Dependent Variables 1"
    t1: Time "Time-Dependent Solver 1"
      tlist = 0.000000000 0.000025000 0.000050000 0.000075000 0.000100000 0.000325000 0.000550000 0.000775000 0.001000000 0.001025000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
      maxorder = 2
      estrat = exclude
      dDef: Direct
      fcDef: FullyCoupled

Datasets
  dset1: Solution | solution = sol1